# Ryan Donahue  Boost Converter Preliminary Design  2/10/18
# Write a set of specifications for power converter design.
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# Voltage input will be provided from a DC power supply:
# input voltage  ->
V_s := 9 V
# input power  ->
P_s := 18 W
# input current ->
I_s := P_s/V_s = 2 A
# Output voltage will be adjustable between:
# minimum output voltage  ->
V_omin := 12 V
# maximum output voltage  ->
V_omax := 18 V
# With 100% efficiency, currents will be:
# minimum output current  ->
I_omax := P_s/V_omax = 1 A
# maximum output current  ->
I_omin := P_s/V_omin = 1.5 A
# With tolerance:
V_ripple < 1 %
# designing for
V_ripple := 1 %
# voltage ripple at minimum output  ->
ΔV_omin := V_omin*V_ripple = 0.12 V
# voltage ripple at maximum output  ->
ΔV_omax := V_omax*V_ripple = 0.18 V
# Load:
# Inductive and resistive load. I am searching for a brushless 12 - 24 DC motor.
# For switching, use a 555 timer operating in an astable mode.
# Timer circuit paramters:
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# "Frequency and duty cycle can be controlled independently with two resistors and one capacitor."
# "A bypass capacitor is highly recommended from VCC to ground pin"
# Datasheet -> | http://www.ti.com/lit/ds/symlink/sa555.pdf
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# Schematic->
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f == sqrt(2)/((R_1 + 2*R_2)*C)
D == (R_1 + R_2)/(R_1 + 2*R_2)*%
# Specs -> | Input voltage = 4.5-16 V | R1 will be 0-100 kOhm resistor
# Maximum current = 200 mA | C will be .47 uF Cap
# Frequency < 100 Hz
# Ideal switching frequency:
# choosen ->
f_s := 40 kHz
# To achieve required gains
V_out/V_in == 1/(1 - D)
# for 12 V  ->
D_12 := -(9/12 - 1) = 0.25
# for 18 V  ->
D_18 := -(9/18 - 1) = 0.5
# Ideal inductor value:
L_min == D*(1 - D)^2*R/(2*f_s)
# for 12 V  ->
L_12min := D_12*(1 - D_12)^2*V_omin^2/(2*f_s*P_s) = 14.0625 μH
# for 18 V  ->
L_18min := D_18*(1 - D_18)^2*V_omax^2/(2*f_s*P_s) = 28.125 μH
# To ensure continuous current, 1.5x the minimum value
L_m := L_18min*1.5 = 42.1875 μH
# Ideal capacitor value:
# for 12 V  ->
C_18 := D_18*P_s/(V_omax^2*f_s*V_ripple) = 69.4444 μF
# for 18 V  ->
C_12 := D_12*P_s/(V_omin^2*f_s*V_ripple) = 78.125 μF
# To ensure a ripple less than 1%, margin of safety 1.5x
C_L := 1.5*C_12 = 117.188 μF
