# Ryan Donahue  Boost Converter Preliminary Design  2/16/18
# Specifications for boost converter design.
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# Voltage input will be provided from a DC power supply:
# input voltage  ->
V_s := 9 V
# input power  ->
P_s < 15 W
# Load:
# Resistive load. 12 - 24 DC motor.
# Datasheet  -> | Link
# Resistance ->
R_m := 37.5 Ω
# Output voltage will be adjustable between:
# minimum output voltage  ->
V_omin := 12 V
# maximum output voltage  ->
V_omax := 24 V
# With 100% efficiency, currents will be:
# minimum output current  ->
I_omax := V_omax/R_m = 0.64 A
# maximum output current  ->
I_omin := V_omin/R_m = 0.32 A
# minimum output power  ->
P_min := V_omin*I_omin = 3.84 W
(starting)
# maximum input power  ->
P_max := V_omax*I_omax = 15.36 W
# With tolerance:
V_ripple < 1 %
# designing for
V_ripple := 1 %
# voltage ripple at minimum output  ->
ΔV_omin := V_omin*V_ripple = 0.12 V
# voltage ripple at maximum output  ->
ΔV_omax := V_omax*V_ripple = 0.24 V
# For switching, use a 555 timer operating in an astable mode.
# "Frequency and duty cycle can be controlled independently with two resistors and one capacitor."
# "A bypass capacitor is highly recommended from VCC to ground pin"
# Datasheet -> | http://www.ti.com/lit/ds/symlink/sa555.pdf
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# Schematic->
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# specs -> | Input voltage = 4.5-16 V
# Maximum current = 200 mA
# Frequency < 100 kHz
# T rise and fall = 100 nS
# Timer circuit paramters:
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f == sqrt(2)/((R_1 + 2*R_2)*C)
D == (R_1 + R_2)/(R_1 + 2*R_2)*%
# R1 will be 0-100 kOhm Potentiometer
# Ideal switching frequency:
# choosen ->
f_s := 40 kHz
# To achieve required gains
V_out/V_in == 1/(1 - D)
# for 12 V  ->
D_12 := -(9/12 - 1) = 0.25
# for 24 V  ->
D_24 := -(9/24 - 1) = 0.625
# Ideal inductor value:
L_min == D*(1 - D)^2*R/(2*f_s)
# for 12 V  ->
L_12min := D_12*(1 - D_12)^2*R_m/(2*f_s) = 65.918 μH
# for 24 V  ->
L_24min := D_24*(1 - D_24)^2*R_m/(2*f_s) = 41.1987 μH
# To ensure continuous current, 1.5x the minimum value
L_m := L_12min*1.5 = 98.877 μH
# Ideal capacitor value:
# for 12 V  ->
C_12 := D_12/(R_m*f_s*V_ripple) = 16.6667 μF
# for 24 V  ->
C_24 := D_24/(R_m*f_s*V_ripple) = 41.6667 μF
# To ensure a ripple less than 1%, margin of safety 1.5x
C_L := 1.5*C_24 = 62.5 μF
# Inductor waveform vs duty cycle and conducting and blocking time:
T_s := 1/f_s = 25 μs
I_Lave(D) := V_s/((1 - D)^2*R_m)
ΔI_L(D) := V_s*D*T_s/L_m
T_on12 := D_12*T_s = 6.25 μs
T_off12 := (1 - D_12)*T_s = 18.75 μs
T_on24 := D_24*T_s = 15.625 μs
T_off24 := (1 - D_24)*T_s = 9.375 μs
I_Lt(t, D) :=
    (I_Lave(D) - ΔI_L(D)/2) + ΔI_L(D)/(D*T_s)*t if 0 ≤ t < D*T_s
    (I_Lave(D) + ΔI_L(D)/2) - ΔI_L(D)/((1 - D)*T_s)*(t - D*T_s) if D*T_s ≤ t ≤ T_s
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# Output voltage vs. Duty cycle:
V_out(D) := V_s/(1 - D)
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