# Ryan Donahue  Boost Converter Preliminary Design  2/21/18
# Specifications for boost converter design.
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# Voltage input will be provided from a DC power supply:
# input voltage  ->
V_s := 9 V
# Output voltage will be adjustable between:
# minimum output voltage  ->
V_omin := 12 V
# maximum output voltage  ->
V_omax := 24 V
# Load:
# Resistive load. 12 - 24 DC motor.
# Datasheet  -> | Link
# Resistance ->
R_m := 37 Ω
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# Torque/current curve
V_out/V_in == 1/(1 - D)
# With 100% efficiency, starting currents: will be:
# minimum output current  ->
I_ostartmax := V_omax/R_m = 0.648649 A
# maximum output current  ->
I_ostartmin := V_omin/R_m = 0.324324 A
# From the load-current curve, zero load steady-state currents:
Ra := 2.2 kΩ
# output current ->
V_emf := .1 V
I_o24 := .65/8*A = 0.08125 A
Rb := Ra
Cap := 10 μF
# input current  ->
I_o12 := .65/6*A = 0.108333 A
Given
1.44/((Ra + 2*Rb)*Cap) = 21.8182 1/s
# Ideal switching frequency:
I_o24 == (24 V - V_emf)/R_m
Rb/(Ra + 2*Rb) = 0.333333
# choosen ->
f_s := 50 kHz
Find(V_emf) = 20.9937 V
# To achieve required gains
V_out/V_in == 1/(1 - D)
# for 12 V  ->
D_12 := -(9/12 - 1) = 0.25
# for 24 V  ->
D_24 := -(9/24 - 1) = 0.625  # og R7 = .5k  , R3 = 1k
# Capacitor selection:
# frequency = 46 k
15.67 μs/(21.7 μs) = 0.72212  # V.out = 26.5V
# designing for
V_ripple := 1 %
# voltage ripple at minimum output  ->
ΔV_omin := V_omin*V_ripple = 0.12 V  # R4 = 4k  # R6 = 1k
# voltage ripple at maximum output  ->
ΔV_omax := V_omax*V_ripple = 0.24 V
# frequency = 45.5 k
5.83 μs/(21.98 μs) = 0.265241  # V.out = 11.51V
# for 12 V  ->
C_12 := D_12/(R_m*f_s*V_ripple) = 13.5135 μF
# R4 = 500 | R6 = 4.5k
# for 24 V  ->
C_24 := D_24/(R_m*f_s*V_ripple) = 33.7838 μF
# To ensure a ripple less than 2.5%, margin of safety 1.5x:
3/17 = 0.176471
1.5*C_24 = 50.6757 μF
# choose  -> | CAP CER 68UF 50V X7R RADIAL | link
4.7*10/(4.7 + 100) = 0.448902
C_L := 68 μF  # rated for 50 V
# Ideal inductor value:
L_min == D*(1 - D)^2*R/(2*f_s)
# for 12 V  ->
L_12min := D_12*(1 - D_12)^2*R_m/(2*f_s) = 52.0312 μH
# for 24 V  ->
L_24min := D_24*(1 - D_24)^2*R_m/(2*f_s) = 32.5195 μH
# To ensure continuous current, 1.5x the minimum value
L_12min*1.5 = 78.0469 μH
# choose ->  RLB0914-221KL-ND | link
# specs  ->
L_m := 220 μH
R_l := .6 Ω  # rated for .8A continuous
# Inductor waveform vs. duty cycle:
T_s := 1/f_s = 20 μs
ΔI_L(D) := V_s*D*T_s/L_m
I_Lave(D) := V_s/((1 - D)^2*R_m)
I_Lt(t, D) :=
    (I_Lave(D) - ΔI_L(D)/2) + ΔI_L(D)/(D*T_s)*t if 0 ≤ t < D*T_s
    (I_Lave(D) + ΔI_L(D)/2) - ΔI_L(D)/((1 - D)*T_s)*(t - D*T_s) if D*T_s ≤ t ≤ T_s
# Diode selection:
# Depends on peak inverse current and average current, or the inductor current for switch open
# inverse voltage  ->
V_Dinv := 12 V  # when transistor is closed
# peak current  ->
I_Dmax := I_ostartmax = 0.648649 A
# average current ->
I_Dave := I_o12 = 0.108333 A
# for diode drop .7->
P_Dave := .525 V*I_Dave = 56.875 mW
# choose  ->  DO201AD Schottky Diode
# datasheet  -> | link
# specs  ->
# working PIV of 40 V
# average 1 A supported
# fall time < 500 nS
# Vdrop of 525 mV
# leakage current 2mA
V_fwd := 525 mV
# MOSFET selection:
# inverse voltage  ->
V_DSoff := V_omax + V_fwd = 24.525 V
# peak current  ->
I_DSmax := I_ostartmax = 0.648649 A
# average current  ->
I_DSave := 1/T_s*integral(I_Lt(t, D_24), t = 0. s .. D_24*T_s) = 1.08108 A
# forward voltage  ->
V_DSmax := 12 V
# choose  -> | MOSFET N-CH 400 V | link
# "ideal for high current and high switching power supplies"
T_don := 15 ns
T_rise := 15 ns
# For switching, use a 555 timer operating in an astable mode.
# Frequency and duty cycle can be controlled independently with two resistors and one capacitor.
# Datasheet -> | http://www.ti.com/lit/ds/symlink/sa555.pdf
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# Schematic->
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T_s = 2e-5 s
# specs -> | Input voltage = 4.5-16 V
# Maximum current = 200 mA
D_24*T_s = 1.25e-5 s
# Frequency < 100 kHz | controlled by Potentiometer
# T rise and fall = 100 nS
